P_2 := 7.25*10^6
P_а := 0.02*10^6
# 3. Построение газодинамического тракта
I_уп := 3609.98
P_п := 700
F`_кр := 0.0002523
F`_а := 0.0099085
m_р := P_п*10^3/I_уп = 193.907
φ_с := 0.98
F_кр := F`_кр*m_р = 0.0489227
φ_β := 0.98
F_крд := F_кр/φ_с = 0.0499211
φ := φ_с*φ_β = 0.9604
F_а := F`_а*m_р = 1.92133
F_ад := F_а/φ_с^2 = 2.00055
L_пр := 1.5
V_кс := L_пр*F_крд = 0.0748817
d_кс := nthroot(4*V_кс/π, 3) = 0.456838
L_кс := d_кс = 0.456838
R_кр := sqrt(F_крд/π) = 0.126057
D_кр := 2*R_кр = 0.252114
R_а := sqrt(F_ад/π) = 0.797994
R_а*2 = 1.59599
R_с1 := 0.25*d_кс = 0.114209
R_с2 := 0.7*D_кр = 0.17648
R_с3 := 0.45*R_кр = 0.0567257
R_а/R_кр = 6.33042
L_a := 15.5*R_кр = 1.95388
